X := [0; 0.8; 1.6; 2.4; 3.2; 4.0]
Y := [8.0; 9.8; 0.9; 0; 0; 0.1]
m := rows(X) - 1 = 5
C(n) :=
    for j ∈ 0 .. n
        for i ∈ 0 .. n
            C[i, j] ← sum(X[k]^(i + j), k = 0 .. m)
    C
b(n) :=
    for i ∈ 0 .. n
        b[i] ← sum(Y[k]*X[k]^i, k = 0 .. m)
    b
# Полином первой степени
n := 1
C(n) = [6, 12; 12, 35.2]
b(n) = [18.8; 9.68]
a1 := lsolve(C(n), b(n))
P11(t) := a1[0] + a1[1]*t
a1 = [8.11905; -2.49286]
R1 := regress(X, Y, n)
P12(t) := R1[3] + R1[4]*t
transpose(R1) = [3, 3, 1, 8.11905, -2.49286]
# Полином второй степени
n := 2
C(n) = [6, 12, 35.2; 12, 35.2, 115.2; 35.2, 115.2, 400.998]
b(n) = [18.8; 9.68; 10.176]
a2 := lsolve(C(n), b(n))
a2 = [9.73214; -5.51741; 0.756138]
P21(t) := a2[0] + a2[1]*t + a2[2]*t^2
R2 := regress(X, Y, n)
transpose(R2) = [3, 3, 2, 9.73214, -5.51741, 0.756138]
P22(t) := R2[3] + R2[4]*t + R2[5]*t^2
interp(R2, X, Y, 2) = 1.72188
# Полином третьей степени
n := 3
C(n) = [
    6, 12, 35.2, 115.2;
    12, 35.2, 115.2, 400.998;
    35.2, 115.2, 400.998, 1449.98;
    115.2, 400.998, 1449.98, 5377.88
]
b(n) = [18.8; 9.68; 10.176; 15.104]
a3 := lsolve(C(n), b(n))
a3 = [8.82381; -0.332341; -2.79204; 0.591363]
P31(t) := a3[0] + a3[1]*t + a3[2]*t^2 + a3[3]*t^3
G(x) := [1; x; x^2; x^3]
a31 := linfit(X, Y, G)
a31 = [8.82381; -0.332341; -2.79204; 0.591363]
# Полином четвертой степени
n := 4
n := 4
P32(t) := a31[0] + a31[1]*t + a31[2]*t^2 + a31[3]*t^3
linfit(X, Y, G)*G(3) = -1.33477
C(n) = [
    6, 12, 35.2, 115.2, 400.998;
    12, 35.2, 115.2, 400.998, 1449.98;
    35.2, 115.2, 400.998, 1449.98, 5377.88;
    115.2, 400.998, 1449.98, 5377.88, 20305.7;
    400.998, 1449.98, 5377.88, 20305.7, 77675
]
C(n) = [
    6, 12, 35.2, 115.2, 400.998;
    12, 35.2, 115.2, 400.998, 1449.98;
    35.2, 115.2, 400.998, 1449.98, 5377.88;
    115.2, 400.998, 1449.98, 5377.88, 20305.7;
    400.998, 1449.98, 5377.88, 20305.7, 77675
]
b(n) = [18.8; 9.68; 10.176; 15.104; 35.5123]
b(n) = [18.8; 9.68; 10.176; 15.104; 35.5123]
a4 := lsolve(C(n), b(n))
a4 := lsolve(C(n), b(n))
a4 = [8.12738; 14.1766; -22.2884; 8.52593; -0.991821]
a4 = [8.12738; 14.1766; -22.2884; 8.52593; -0.991821]
P41(t) := a4[0] + a4[1]*t + a4[2]*t^2 + a4[3]*t^3 + a4[4]*t^4
P41(t) := a4[0] + a4[1]*t + a4[2]*t^2 + a4[3]*t^3 + a4[4]*t^4
R4 := regress(X, Y, n)
P42(t) := interp(R4, X, Y, t)
transpose(R4) = [3, 3, 4, 8.12738, 14.1766, -22.2884, 8.52593, -0.991821]
P42(1) = 7.54967
P41(1) = 7.54967
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d(k) :=
    d ← 0
    for i ∈ 0 .. rows(X) - 1
        d ← d + (Y[i] - interp(regress(X, Y, k), X, Y, X[i]))^2
    d
n := 1 .. 4
d(n) = [32.3528; 23.6098; 17.6693; 4.08893]
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